*Heading
 S1 / BFGS
** Job name: task7_s1_bfgs_refined Model name: S1_BFGS
** Generated by: Abaqus/CAE Learning Edition 2025
*Preprint, echo=NO, model=NO, history=NO, contact=NO
**
** PARTS
**
*Part, name=TowerShell
*Node
      1,   33.4582481,    3.5999999,           0.
      2,   39.2999992,           0.,           0.
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*Element, type=S4R
 1,   1,  50, 451,  51
 2,  50,  49, 452, 451
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*Nset, nset=FALL, generate
   1,  840,    1
*Elset, elset=FALL, generate
   1,  800,    1
*Nset, nset=EBASE
  2, 52, 53, 54, 55, 56
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*Elset, elset=EBASE, generate
 41,  80,   1
*Nset, nset=ETOP
  11, 411, 412, 413, 414, 415
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*Elset, elset=ETOP, generate
 721,  760,    1
** Section: TowerSection
*Shell Section, elset=FALL, material=EquivalentReinforcedConcrete_C30_37
0.2, 5
*End Part
**
**
** ASSEMBLY
**
*Assembly, name=Assembly
**
*Instance, name=Tower-1, part=TowerShell
*End Instance
**
*Elset, elset=__PickedSurf3_SPOS, internal, instance=Tower-1, generate
   1,  800,    1
*Surface, type=ELEMENT, name=_PickedSurf3, internal
__PickedSurf3_SPOS, SPOS
*Elset, elset=__PickedSurf4_SPOS, internal, instance=Tower-1, generate
   1,  800,    1
*Surface, type=ELEMENT, name=_PickedSurf4, internal
__PickedSurf4_SPOS, SPOS
*End Assembly
**
** MATERIALS
**
*Material, name=EquivalentReinforcedConcrete_C30_37
*Density
2500.,
*Elastic
 3.3e+10, 0.2
**
** BOUNDARY CONDITIONS
**
** Name: FixBase Type: Displacement/Rotation
*Boundary
Tower-1.EBASE, 1, 1
Tower-1.EBASE, 2, 2
Tower-1.EBASE, 3, 3
Tower-1.EBASE, 4, 4
Tower-1.EBASE, 5, 5
Tower-1.EBASE, 6, 6
** ----------------------------------------------------------------
**
** STEP: STATIC_WIND
**
*Step, name=STATIC_WIND, nlgeom=NO
*Static
1., 1., 1e-05, 1.
**
** LOADS
**
** Name: SelfWeight   Type: Gravity
*Dload, op=NEW
, GRAV, 9.81, 0., -1., 0.
** Name: Wind   Type: Pressure Using Field: WindCp
*Dload, op=NEW
Tower-1.1, P, 448.613
Tower-1.2, P, 437.566
Tower-1.3, P, 415.746
Tower-1.4, P, 383.688
Tower-1.5, P, 342.183
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Tower-1.800, P, 448.613
**
** OUTPUT REQUESTS
**
*Restart, write, frequency=0
**
** FIELD OUTPUT: F-Output-1
**
*Output, field, variable=PRESELECT
**
** HISTORY OUTPUT: H-Output-1
**
*Output, history, variable=PRESELECT
*End Step
** ----------------------------------------------------------------
**
** STEP: BUCKLING
**
*Step, name=BUCKLING, nlgeom=NO, perturbation
*Buckle
5, , 20, 120
**
** BOUNDARY CONDITIONS
**
** Name: FixBase Type: Displacement/Rotation
*Boundary, op=NEW, load case=1
Tower-1.EBASE, 1, 1
Tower-1.EBASE, 2, 2
Tower-1.EBASE, 3, 3
Tower-1.EBASE, 4, 4
Tower-1.EBASE, 5, 5
Tower-1.EBASE, 6, 6
*Boundary, op=NEW, load case=2
Tower-1.EBASE, 1, 1
Tower-1.EBASE, 2, 2
Tower-1.EBASE, 3, 3
Tower-1.EBASE, 4, 4
Tower-1.EBASE, 5, 5
Tower-1.EBASE, 6, 6
**
** LOADS
**
** Name: SelfWeightBuckling   Type: Gravity
*Dload, op=NEW
, GRAV, 9.81, 0., -1., 0.
** Name: WindBuckling   Type: Pressure Using Field: WindCp
*Dload, op=NEW
Tower-1.1, P, 448.613
Tower-1.2, P, 437.566
Tower-1.3, P, 415.746
Tower-1.4, P, 383.688
Tower-1.5, P, 342.183
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Tower-1.800, P, 448.613
**
** OUTPUT REQUESTS
**
*Restart, write, frequency=0
**
** FIELD OUTPUT: F-Output-2
**
*Output, field, variable=PRESELECT
*End Step
