*HEADING
** Task 7 generated input for S4 / BFGS (engineering_feasible)
*PREPRINT, ECHO=NO, MODEL=NO, HISTORY=NO, CONTACT=NO
*NODE
1, 39.300000, 0.000000, 0.000000
2, 36.308466, 0.000000, 15.039459
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*ELEMENT, TYPE=S4R, ELSET=EALL
1, 1, 2, 18, 17
2, 2, 3, 19, 18
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*NSET, NSET=NALL
1, 2, 3, 4, 5, 6
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*NSET, NSET=NBASE
1, 2, 3, 4, 5, 6, 7, 8, 9, 10, 11, 12, 13, 14, 15, 16
*NSET, NSET=NTOP
193, 194, 195, 196, 197, 198, 199, 200, 201, 202, 203, 204, 205, 206, 207, 208
*ELSET, ELSET=WIND_SEC_01
1, 17, 33, 49, 65, 81, 97, 113, 129, 145, 161, 177
*ELSET, ELSET=WIND_SEC_02
2, 18, 34, 50, 66, 82, 98, 114, 130, 146, 162, 178
*ELSET, ELSET=WIND_SEC_03
3, 19, 35, 51, 67, 83, 99, 115, 131, 147, 163, 179
*ELSET, ELSET=WIND_SEC_04
4, 20, 36, 52, 68, 84, 100, 116, 132, 148, 164, 180
*ELSET, ELSET=WIND_SEC_05
5, 21, 37, 53, 69, 85, 101, 117, 133, 149, 165, 181
*ELSET, ELSET=WIND_SEC_06
6, 22, 38, 54, 70, 86, 102, 118, 134, 150, 166, 182
*ELSET, ELSET=WIND_SEC_07
7, 23, 39, 55, 71, 87, 103, 119, 135, 151, 167, 183
*ELSET, ELSET=WIND_SEC_08
8, 24, 40, 56, 72, 88, 104, 120, 136, 152, 168, 184
*ELSET, ELSET=WIND_SEC_09
9, 25, 41, 57, 73, 89, 105, 121, 137, 153, 169, 185
*ELSET, ELSET=WIND_SEC_10
10, 26, 42, 58, 74, 90, 106, 122, 138, 154, 170, 186
*ELSET, ELSET=WIND_SEC_11
11, 27, 43, 59, 75, 91, 107, 123, 139, 155, 171, 187
*ELSET, ELSET=WIND_SEC_12
12, 28, 44, 60, 76, 92, 108, 124, 140, 156, 172, 188
*ELSET, ELSET=WIND_SEC_13
13, 29, 45, 61, 77, 93, 109, 125, 141, 157, 173, 189
*ELSET, ELSET=WIND_SEC_14
14, 30, 46, 62, 78, 94, 110, 126, 142, 158, 174, 190
*ELSET, ELSET=WIND_SEC_15
15, 31, 47, 63, 79, 95, 111, 127, 143, 159, 175, 191
*ELSET, ELSET=WIND_SEC_16
16, 32, 48, 64, 80, 96, 112, 128, 144, 160, 176, 192
*MATERIAL, NAME=EquivalentReinforcedConcrete_C30_37
*ELASTIC
33000000000.000000, 0.200000
*DENSITY
2500.000000
*SHELL SECTION, ELSET=EALL, MATERIAL=EquivalentReinforcedConcrete_C30_37
0.200000
*BOUNDARY
NBASE, 1, 6
*STEP, NAME=STATIC_WIND, NLGEOM=NO
*STATIC
0.1, 1.0, 1e-05, 1.0
*DLOAD
EALL, GRAV, 9.810000, 0.000000, -1.000000, 0.000000
WIND_SEC_01, P, -441.353376
WIND_SEC_02, P, -374.161326
WIND_SEC_03, P, -250.006605
WIND_SEC_04, P, -87.790645
WIND_SEC_05, P, 87.790645
WIND_SEC_06, P, 250.006605
WIND_SEC_07, P, 281.250000
WIND_SEC_08, P, 281.250000
WIND_SEC_09, P, 281.250000
WIND_SEC_10, P, 281.250000
WIND_SEC_11, P, 250.006605
WIND_SEC_12, P, 87.790645
WIND_SEC_13, P, -87.790645
WIND_SEC_14, P, -250.006605
WIND_SEC_15, P, -374.161326
WIND_SEC_16, P, -441.353376
*OUTPUT, FIELD, FREQUENCY=1
*NODE OUTPUT, NSET=NALL
U
*NODE OUTPUT, NSET=NBASE
RF
*ELEMENT OUTPUT, ELSET=EALL
S, E
*END STEP
*STEP, NAME=BUCKLING, PERTURBATION
*BUCKLE, EIGENSOLVER=LANCZOS
5,
*DLOAD
EALL, GRAV, 9.810000, 0.000000, -1.000000, 0.000000
WIND_SEC_01, P, -441.353376
WIND_SEC_02, P, -374.161326
WIND_SEC_03, P, -250.006605
WIND_SEC_04, P, -87.790645
WIND_SEC_05, P, 87.790645
WIND_SEC_06, P, 250.006605
WIND_SEC_07, P, 281.250000
WIND_SEC_08, P, 281.250000
WIND_SEC_09, P, 281.250000
WIND_SEC_10, P, 281.250000
WIND_SEC_11, P, 250.006605
WIND_SEC_12, P, 87.790645
WIND_SEC_13, P, -87.790645
WIND_SEC_14, P, -250.006605
WIND_SEC_15, P, -374.161326
WIND_SEC_16, P, -441.353376
*OUTPUT, FIELD, FREQUENCY=1
*NODE OUTPUT, NSET=NALL
U
*END STEP
